Q := [8, -1; -1, 2]
R := [7, 3]
X(x, y) := [x, y]
f(x1, x2) := 1/2*X(x1, x2)*Q*transpose(X(x1, x2)) + R*transpose(X(x1, x2)) → 7*x1 + 3*x2 + x2*(x2 - x1/2) + x1*(4*x1 - x2/2)
ddx1(x1, x2) := d/dx1(f(x1, x2))
ddx2(x1, x2) := d/dx2(f(x1, x2))
df(x1, x2) := [ddx1(x1, x2), ddx2(x1, x2)]
e1 := [1, 0]
e2 := [0, 1]
a := 1
x1 := 1
x2 := 1
f(x1, x2) := 7*x1 + 3*x2 + x2*(x2 - x1/2) + x1*(4*x1 - x2/2)
Xmin := Minimize(f, x1, x2)
Xmin = [-1.13333; -2.06667]
f(Xmin[0], Xmin[1]) = -7.06667
Pokoord_spusk(e, h) :=
    i ← 0
    f2 ← f(x1, x2)
    while 1
        x1 ← x1 + h if f(x1 + h, x2) < f(x1, x2)
        otherwise
            x1 ← x1 - h if f(x1 - h, x2) < f(x1, x2)
        i ← i + 1
        break if |f2 - f(x1, x2)| < e
        f2 ← f(x1, x2)
    [x1; x2; i]
res := Pokoord_spusk(0.00001, 0.01) = [-0.75; 1; 176]
f(res[0], res[1]) = 1.75
pokoord_spusk2(e, h) :=
    i ← 0
    f2 ← f(x1, x2)
    while 1
        x1 ← root(ddx1(x1, x2), x1)
        i ← i + 1
        if |f2 - f(x1, x2)| < e
            {
                break
            }
        f2 ← f(x1, x2)
    [x1; x2; i]
res2 := pokoord_spusk2(0.00001, 0.01)
res2 = [-0.75; 1; 2]
f(x1, x2) := 7*x1 + 3*x2 + x2*(x2 - x1/2) + x1*(4*x1 - x2/2)
a := 1
l1 := [1, 0]
l2 := [0, 1]
x0 := [0, 0]
f(0, 0) = 0
# 1 цикл
# 1 итерация
x1 := [-1, 0]
f(-1, 0) = -3
-3 < 0
x1 := [1, 0]
f(1, 0) = 11
-3 < 11
x1 := [-1, 0]
# 2 итерация
x2 := [-1, -1]
f(-1, -1) = -6
-6 < -3
x2 := [-1, 1]
f(-1, 1) = 2
-6 < 2
x2 := [-1, -1]
# 2 цикл
# 1 итерация
x3 := [-2, -1]
f(-2, -1) = -2
-2 > -6
x3 := [0, -1]
f(0, -1) = -2
-2 > -6
x3 := [-1, -1]
# 2 итерация
x4 := [-1, -2]
f(-1, -2) = -7
-7 < -6
x4 := [-1, 0]
f(-1, 0) = -3
-3 > -7
x4 := [-1, -2]
# 3 цикл
# 1 итерация
x5 := [-2, -2]
f(-2, -2) = -4
-4 > -7
x5 := [0, -2]
f(0, -2) = -2
-2 > -7
x5 := [-1, -2]
# 2 итерация
x6 := [-1, -1]
f(-1, -3) = -6
-6 > -7
x6 := [-1, -1]
f(-1, -1) = -6
-6 > -7
x6 := [-1, -2]
# так как цикл оказался нерезультативным, то
a := a/2
a = 0.5  # критерий окончания не выполняется: 0,05 < 0.5
# 4 цикл
# 1 итерация
x7 := [-1.5, -2]
f(-1.5, -2) = -6.5
-6.5 > -7
x7 := [-0.5, -2]
f(-0.5, -2) = -5.5
-5.5 > -7
x7 := [-1, -2]
# 2 итерация
x8 := [-1, -2.5]
f(-1, -2.5) = -6.75
-6.75 > -7
x8 := [-1, -1.5]
f(-1, -1.5) = -6.75
-6.75 > -7
x8 := [-1, -2]
# так как цикл оказался нерезультативным, то
a := a/2
a = 0.25  # критерий окончания не выполняется: 0,05 < 0.25
# 5 цикл
# 1 итерация
x9 := [-1.25, -2]
f(-1.25, -2) = -7
-7 = -7
x9 := [-0.75, -2]
f(-0.75, -2) = -6.5
-6.5 > -7
x9 := [-1, -2]
# 2 итерация
x10 := [-1, -2.25]
f(-1, -2.25) = -6.9375
-6.938 < -7
x10 := [-1, -1.75]
f(-1, -1.75) = -6.9375
-6.938 > -7
x10 := [-1, -2]
# так как цикл оказался нерезультативным, то
a := a/2
a = 0.125  # критерий окончания не выполняется: 0,05 < 0.125
# 6 цикл
# 1 итерация
x11 := [-1.125, -2]
f(-1.125, -2) = -7.0625
-7.063 < -7
x11 := [-0.875, -2]
f(-0.875, -2) = -6.8125
-6.813 > -7.063
x11 := [-1.125, -2]
# 2 итерация
x12 := [-1.125, -2.125]
f(-1.125, -2.125) = -7.0625
-7.063 = -7.063
x12 := [-1.125, -1.875]
f(-1.125, -1.875) = -7.03125
-7.031 > -7.063
x12 := [-1.125, -2.125]
# 7 цикл
# 1 итерация
x13 := [-1.250, -2.125]
f(-1.250, -2.125) = -7.01562
-7.016 > -7.063
x13 := [-1, -2.125]
f(-1, -2.125) = -6.98438
-6.984 > -7.063
x13 := [-1.125, -2.125]
# 2 итерация
x14 := [-1.125, -2.250]
f(-1.125, -2.5) = -6.875
-6.875 > -7.063
x14 := [-1.125, -2]
f(-1.125, -2) = -7.0625
-7.063 = -7.063
x14 := [-1.125, -2.125]
# так как цикл оказался нерезультативным, то
a := 0.05
# 8 цикл
# 1 итерация
x15 := [(-1, 13), (-2, 125)]
f(-1.13, -2.125) = -7.06303
7.063 = 7.063
x15 := [-1.2, -2.125]
f(-1.2, -2.125) = -7.04938
-7.049 > -7.063
# 2 итерация
x16 := [-1.125, -2.13]
f(-1.12, -2.13) = -7.0611
-7.062 > -7.063
x16 := [-1.125, -2.12]
f(-1.125, -2.12) = -7.0631
# критерий окончания выполняется 0,005 = 0,05
xmin := x16 = [-1.125, -2.12]
fmin := f(-1.125, -2.12) = -7.0631
