Q := [8, -1; -1, 2]
f(x1, x2) := 7*x1 + 3*x2 + x2*(x2 - x1/2) + x1*(4*x1 - x2/2)
d/dx1(f(x1, x2)) → 8*x1 - x2 + 7
d/dx2(f(x1, x2)) → 2*x2 - x1 + 3
f1(x1, x2) := [d/dx1(f(x1, x2)), d/dx2(f(x1, x2))]
x0 := [0, 0]
f(0, 0) = 0
# 1 итерация
h0 := -f1(0, 0)
a0 := h0*transpose(h0)/(h0*Q*transpose(h0)) = 0.157609
x0 := x0 + a0*h0 = [-1.10326, -0.472826]
f1(x0[0, 0], x0[0, 1]) = [-1.35326, 3.15761]
# 2 итерация
B0 := f1(x0[0, 0], x0[0, 1])*Q*transpose(h0)/(h0*Q*transpose(h0)) = 0.203479
h0 := -f1(x0[0, 0], x0[0, 1]) + B0*h0 = [-0.0710952, -3.76805]
a0 := -f1(x0[0, 0], x0[0, 1])*transpose(h0)/(h0*Q*transpose(h0)) = 0.422989
x0 := x0 + a0*h0 = [-1.13333, -2.06667]
fmin := f(x0[0, 0], x0[0, 1]) = -7.06667
